r2g(x) := x*180/π
g2r(x) := x*π/180
x1 := 50
α := g2r(23.2) = 0.404916
y1 := 40
# ret.x = xloc_ * cos(th_) - yloc_ * sin(th_);
# ret.y = yloc_ * cos(th_) + xloc_ * sin(th_)
x0 := x1*cos(α) - y1*sin(α) = 30.1991
y0 := x1*sin(α) + y1*cos(α) = 56.4625
cos(α) = 0.919135
x1 := 20
x2 := 40
# Мой угол=
α := 53.914  # градусов
y1 := 20
y2 := 280
γ := g2r(α*2) = 1.88195  # радиан
x3 := (x1 - x2)^2 = 400
D := 4*sin(γ/2)^2 = 2.61232
y3 := (y1 - y2)^2 = 67600
r := sqrt((x3 + y3)/D) float, 10 → 161.3396738
A1 := (x1 + x2)/2 - (y1 - y2)/2*cot(γ/2) = 124.749
B1 := (y1 + y2)/2 + (x1 - x2)/2*cot(γ/2) float, 10 → 142.7116167
A2 := (x1 + x2)/2 + (y1 - y2)/2*cot(γ/2) = -64.749
B2 := (y1 + y2)/2 - (x1 - x2)/2*cot(γ/2) float, 10 → 157.2883833
Ox1 := A1 = 124.749
Oy1 := B1 = 142.712
r1 := r = 161.34
# Мой угол=
α := 52.943  # градусов
x1 := 40
x2 := 320
y1 := 280
y2 := 280
γ := g2r(α*2) float, 10 → 1.848059332
x3 := (x1 - x2)^2 = 78400
D := 4*sin(γ/2)^2 = 2.54745
y3 := (y1 - y2)^2 = 0
r := sqrt((x3 + y3)/D) float, 10 → 175.4305929
A1 := (x1 + x2)/2 - (y1 - y2)/2*cot(γ/2) = 180
B1 := (y1 + y2)/2 + (x1 - x2)/2*cot(γ/2) float, 8 → 174.2839
A2 := (x1 + x2)/2 + (y1 - y2)/2*cot(γ/2) = 180
B2 := (y1 + y2)/2 - (x1 - x2)/2*cot(γ/2) float, 8 → 385.7161
Ox2 := A1 = 180
Oy2 := B1 = 174.284
r2 := r float, 10 → 175.4305929
d1 := sqrt((Ox1 - Ox2)^2 + (Oy1 - Oy2)^2) float, 10 → 63.63555563
aa := (r1^2 - r2^2 + d1^2)/(2*d1) float, 10 → -5.468001624
h := sqrt(r1^2 - aa^2) float, 10 → 161.2469885
P3x := Ox1 + aa/d1*(Ox2 - Ox1) = 120.001
P3y := Oy1 + aa/d1*(Oy2 - Oy1) = 139.999
P4x := P3x - h/d1*(Oy2 - Oy1) = 40
P4y := P3y + h/d1*(Ox2 - Ox1) float, 10 → 280.0000037
P4x := P3x + h/d1*(Oy2 - Oy1) = 200.003
P4y := P3y - h/d1*(Ox2 - Ox1) float, 10 → -0.002582815946
ТОЧКА_ИЗ_ГЛОБАЛЬНОЙ_В_ЛОКАЛЬНУЮ
x_g := 1376.27
xloc := 500
y_g := 1079.32
yloc := 900
tetha_ := 15
theta := g2r(tetha_) = 0.261799
x_g := x_g - xloc = 876.27
y_g := y_g - yloc = 179.32
xnew := x_g*cos(theta) - y_g*sin(theta) float, 10 → 800.0003926
ynew := x_g*sin(theta) + y_g*cos(theta) float, 10 → 400.0051838
ТОЧКА_ИЗ_ЛОКАЛЬНОЙ_В_ГЛОБАЛЬНУЮ
x_l := 800
xloc := 500
y_l := 400
yloc := 900
tetha_ := 15
theta := g2r(tetha_) = 0.261799
xnew := x_l*cos(theta) + y_l*sin(theta) float, 10 → 876.2682791
ynew := -x_l*sin(theta) + y_l*cos(theta) float, 10 → 179.3150944
xnew := xnew + xloc float, 10 → 1376.268279
ynew := ynew + yloc float, 10 → 1079.315094
ТОЧКА_ИЗ_ГЛОБАЛЬНОЙ_В_ЛОКАЛЬНУЮ
x_g := 3500
xloc := 1376.27
yloc := 1079.32
y_g := 2800
tetha_ := -30
theta := g2r(tetha_) = -0.523599
x_g := x_g - xloc float, 10 → 2123.73
y_g := y_g - yloc float, 10 → 1720.68
xnew := x_g*cos(theta) - y_g*sin(theta) float, 10 → 2699.544131
ynew := x_g*sin(theta) + y_g*cos(theta) float, 10 → 428.2875918
x := 2699.55  # УГОЛ_ИЗ_ВЕКТОРА
y := 428.29
d := x/y float, 10 → 6.303089028
alfa := atan(d) = 1.41346
theta := r2g(alfa) = 80.985
