r2g(x) := x*180/π
g2r(x) := x*π/180
x1 := 3000
y1 := -1700
x2 := 63.64
y2 := -63.64
L1 := sqrt(x1^2 + y1^2) = 3448.19
R := sqrt(x2^2 + y2^2) = 90.0006
α1 := 1*asin(y1/L1) = -0.515549
α2 := asin(y2/R) = -0.785398
A1 := r2g(α1) = -29.5388
A2 := r2g(α2) = -45
A3 := abs(A2 - A1) = 15.4612
α3 := g2r(A3) = 0.269849
cc := L1 - R*cos(α3) = 3361.44
dd := R*sin(α3) = 23.9929
ee := (L1 - R*cos(α3))/(R*sin(α3)) = 140.102
B := atan((L1 - R*cos(α3))/(R*sin(α3))) = 1.56366
Br := r2g(B) = 89.591
B4 := 180 - Br - (90 - A3) = 15.8702
r2g(atan2(x1, y1)) = -29.5388
r2g(atan2(x2, y2)) = -45
x1 := -0.5
y1 := 2
x2 := -0.06364
y2 := -0.06364
a4 := r2g(-atan2(x1, y1)) = -104.036
a2 := r2g(-atan2(x2, y2)) = 135
c := 360 + a4 = 255.964
L1 := sqrt(x1^2 + y1^2) = 2.06155
α1 := 1*asin(y1/L1) = 1.32582
R := sqrt(x2^2 + y2^2) = 0.0900006
A1 := 180 - r2g(α1) = 104.036
α2 := asin(y2/R) = -0.785398
r2g(atan2(x1, y1)) = 104.036
A2 := 180 + r2g(α2) = 135
A3 := 1*(A2 + A1) = 239.036
α3 := g2r(A3) = 4.17197
cc := L1 - R*cos(α3) = 2.10786
dd := R*sin(α3) = -0.0771748
B := atan((L1 - R*cos(α3))/(R*sin(α3))) = -1.5342
Br := r2g(B) = -87.9032
B := atan2(cc, dd) = -0.0365966
Br := r2g(B) = -2.09683
Rez := Br + A3 = 236.939
B4 := 180 - abs(Br) - (90 - abs(A3)) = 326.939
x1 := -1000
y1 := -1500
x2 := 63.64
y2 := 63.64
L1 := sqrt(x1^2 + y1^2) = 1802.78
R := sqrt(x2^2 + y2^2) = 90.0006
α1 := abs(asin(y1/L1)) = 0.982794
α2 := asin(x2/R) = 0.785398
A1 := r2g(α1) = 56.3099
A2 := r2g(α2) = 45
A3 := abs(A2 - A1) = 11.3099
α3 := g2r(A3) = 0.197396
B := atan((L1 - R*cos(α3))/(R*sin(α3))) = 1.5605
Br := r2g(B) = 89.4102
B4 := 180 - Br - (90 - A3) = 11.8998
x1 := -500
y1 := -2000
x2 := -63.64
y2 := -63.64
L1 := sqrt(x1^2 + y1^2) = 2061.55
R := sqrt(x2^2 + y2^2) = 90.0006
α1 := 1*asin(y1/L1) = -1.32582
α2 := asin(y2/R) = -0.785398
A1 := -180 - r2g(α1) = -104.036
A2 := r2g(α2) = -45
A3 := abs(A2 - A1) = 59.0362
α3 := g2r(A3) = 1.03038
cc := L1 - R*cos(α3) = 2015.25
dd := R*sin(α3) = 77.1748
B := atan((L1 - R*cos(α3))/(R*sin(α3))) = 1.53252
ee := (L1 - R*cos(α3))/(R*sin(α3)) = 26.1128
Br := r2g(B) = 87.8069
B4 := 180 - abs(Br) - (90 - abs(A3)) = 61.2293
x1 := -500
y1 := 2000
x2 := 63.64
y2 := 63.64
L1 := sqrt(x1^2 + y1^2) = 2061.55
R := sqrt(x2^2 + y2^2) = 90.0006
α1 := abs(asin(y1/L1)) = 1.32582
α2 := asin(x2/R) = 0.785398
A1 := r2g(α1) = 75.9638
A2 := r2g(α2) = 45
A3 := abs(A2 - A1) = 30.9638
α3 := g2r(A3) = 0.54042
B := atan((L1 - R*cos(α3))/(R*sin(α3))) = 1.54747
Br := r2g(B) = 88.6633
B4 := 180 - Br - (90 - A3) = 32.3005
x1 := 4000
y1 := 2000
x2 := 63.64
y2 := 63.64
L1 := sqrt(x1^2 + y1^2) = 4472.14
R := sqrt(x2^2 + y2^2) = 90.0006
α1 := abs(asin(y1/L1)) = 0.463648
α2 := asin(x2/R) = 0.785398
A1 := r2g(α1) = 26.5651
A2 := r2g(α2) = 45
A3 := abs(A2 - A1) = 18.4349
α3 := g2r(A3) = 0.321751
B := atan((L1 - R*cos(α3))/(R*sin(α3))) = 1.56431
Br := r2g(B) = 89.6283
B4 := 180 - Br - (90 - A3) = 18.8067
x1 := -2000
x2 := 63.64
y1 := 4000
y2 := 63.64
L1 := sqrt(x1^2 + y1^2) = 4472.14
R := sqrt(x2^2 + y2^2) = 90.0006
α1 := acos(x1/L1) = 2.03444
α2 := asin(x2/R) = 0.785398
A1 := r2g(α1) - 90 = 26.5651
A2 := r2g(α2) = 45
A3 := abs(A2 - A1) = 18.4349
α3 := g2r(A3) = 0.321751
B := atan((L1 - R*cos(α3))/(R*sin(α3))) = 1.56431
Br := r2g(B) = 89.6283
B4 := 180 - Br - (90 - A3) = 18.8067
x1 := 20
x2 := 40
# Мой угол=
α := 53.914  # градусов
y1 := 20
y2 := 280
γ := g2r(α*2) = 1.88195  # радиан
x3 := (x1 - x2)^2 = 400
D := 4*sin(γ/2)^2 = 2.61232
y3 := (y1 - y2)^2 = 67600
r := sqrt((x3 + y3)/D) float, 10 → 161.3396738
A1 := (x1 + x2)/2 - (y1 - y2)/2*cot(γ/2) = 124.749
B1 := (y1 + y2)/2 + (x1 - x2)/2*cot(γ/2) float, 10 → 142.7116167
A2 := (x1 + x2)/2 + (y1 - y2)/2*cot(γ/2) = -64.749
B2 := (y1 + y2)/2 - (x1 - x2)/2*cot(γ/2) float, 10 → 157.2883833
Ox1 := A1 = 124.749
Oy1 := B1 = 142.712
r1 := r = 161.34
# Мой угол=
α := 52.943  # градусов
x1 := 40
x2 := 320
y1 := 280
y2 := 280
γ := g2r(α*2) float, 10 → 1.848059332
x3 := (x1 - x2)^2 = 78400
D := 4*sin(γ/2)^2 = 2.54745
y3 := (y1 - y2)^2 = 0
r := sqrt((x3 + y3)/D) float, 10 → 175.4305929
A1 := (x1 + x2)/2 - (y1 - y2)/2*cot(γ/2) = 180
B1 := (y1 + y2)/2 + (x1 - x2)/2*cot(γ/2) float, 8 → 174.2839
A2 := (x1 + x2)/2 + (y1 - y2)/2*cot(γ/2) = 180
B2 := (y1 + y2)/2 - (x1 - x2)/2*cot(γ/2) float, 8 → 385.7161
Ox2 := A1 = 180
Oy2 := B1 = 174.284
r2 := r float, 10 → 175.4305929
d1 := sqrt((Ox1 - Ox2)^2 + (Oy1 - Oy2)^2) float, 10 → 63.63555563
aa := (r1^2 - r2^2 + d1^2)/(2*d1) float, 10 → -5.468001624
h := sqrt(r1^2 - aa^2) float, 10 → 161.2469885
P3x := Ox1 + aa/d1*(Ox2 - Ox1) = 120.001
P3y := Oy1 + aa/d1*(Oy2 - Oy1) = 139.999
P4x := P3x - h/d1*(Oy2 - Oy1) = 40
P4y := P3y + h/d1*(Ox2 - Ox1) float, 10 → 280.0000037
P4x := P3x + h/d1*(Oy2 - Oy1) = 200.003
P4y := P3y - h/d1*(Ox2 - Ox1) float, 10 → -0.002582815946
ТОЧКА_ИЗ_ГЛОБАЛЬНОЙ_В_ЛОКАЛЬНУЮ
x_g := 1376.27
xloc := 500
y_g := 1079.32
yloc := 900
tetha_ := 15
theta := g2r(tetha_) = 0.261799
x_g := x_g - xloc = 876.27
y_g := y_g - yloc = 179.32
xnew := x_g*cos(theta) - y_g*sin(theta) float, 10 → 800.0003926
ynew := x_g*sin(theta) + y_g*cos(theta) float, 10 → 400.0051838
ТОЧКА_ИЗ_ЛОКАЛЬНОЙ_В_ГЛОБАЛЬНУЮ
x_l := 800
xloc := 500
y_l := 400
yloc := 900
tetha_ := 15
theta := g2r(tetha_) = 0.261799
xnew := x_l*cos(theta) + y_l*sin(theta) float, 10 → 876.2682791
ynew := -x_l*sin(theta) + y_l*cos(theta) float, 10 → 179.3150944
xnew := xnew + xloc float, 10 → 1376.268279
ynew := ynew + yloc float, 10 → 1079.315094
ТОЧКА_ИЗ_ГЛОБАЛЬНОЙ_В_ЛОКАЛЬНУЮ
x_g := 3500
xloc := 1376.27
yloc := 1079.32
y_g := 2800
tetha_ := -30
theta := g2r(tetha_) = -0.523599
x_g := x_g - xloc float, 10 → 2123.73
y_g := y_g - yloc float, 10 → 1720.68
xnew := x_g*cos(theta) - y_g*sin(theta) float, 10 → 2699.544131
ynew := x_g*sin(theta) + y_g*cos(theta) float, 10 → 428.2875918
x := 2699.55  # УГОЛ_ИЗ_ВЕКТОРА
y := 428.29
d := x/y float, 10 → 6.303089028
alfa := atan(d) = 1.41346
theta := r2g(alfa) = 80.985
